contourn
0.0
0 0 0.0
0.35966 0.28963 1.33600
0.2600 0.0 0.0
0.0

SURFACE
Wing
14 1.0
YDUPLICATE
0.0
ANGLE
0.0

SECTION
-0.00000 0.00000 -0.00000 0.40120 0.211 2 1.0
AFILE
af_y000.dat

SECTION
-0.00000 0.01500 -0.00000 0.40119 0.211 2 1.0
AFILE
af_y015.dat

SECTION
-0.00000 0.03000 -0.00000 0.40113 0.211 2 1.0
AFILE
af_y030.dat

SECTION
-0.00000 0.04500 -0.00000 0.40105 0.211 2 1.0
AFILE
af_y045.dat

SECTION
-0.00000 0.06000 -0.00000 0.40097 0.211 2 1.0
AFILE
af_y060.dat

SECTION
-0.00000 0.07500 -0.00000 0.40102 0.211 2 1.0
AFILE
af_y075.dat

SECTION
0.00834 0.09000 0.00004 0.39446 0.218 2 1.0
AFILE
af_y090.dat

SECTION
0.03216 0.11000 0.00005 0.37570 0.221 2 1.0
AFILE
af_y110.dat

SECTION
0.05598 0.13000 0.00002 0.35694 0.220 2 1.0
AFILE
af_y130.dat

SECTION
0.07979 0.15000 0.00002 0.33819 0.221 3 1.0
AFILE
af_y150.dat

SECTION
0.10954 0.17500 -0.00005 0.31477 0.213 3 1.0
AFILE
af_y175.dat

SECTION
0.13928 0.20000 -0.00008 0.29136 0.210 3 1.0
AFILE
af_y200.dat

SECTION
0.16900 0.22500 -0.00014 0.26796 0.200 3 1.0
AFILE
af_y225.dat

SECTION
0.19870 0.25000 -0.00018 0.24459 0.194 2 1.0
AFILE
af_y250.dat

SECTION
0.22241 0.27000 -0.00019 0.22594 -0.284 2 1.0
AFILE
af_y270.dat

SECTION
0.23954 0.28500 -0.00019 0.21631 -0.770 2 1.0
AFILE
af_y285.dat

SECTION
0.24514 0.29500 -0.00019 0.25027 -0.992 3 1.0
AFILE
af_y295.dat
CONTROL
elevator 1.0 0.7260 0 0 0 1.0
CONTROL
aileron 1.0 0.7260 0 0 0 -1.0

SECTION
0.25913 0.32000 -0.00019 0.27549 -1.160 4 1.0
AFILE
af_y320.dat
CONTROL
elevator 1.0 0.6220 0 0 0 1.0
CONTROL
aileron 1.0 0.6220 0 0 0 -1.0

SECTION
0.27591 0.35000 -0.00019 0.26550 -1.860 6 1.0
AFILE
af_y350.dat
CONTROL
elevator 1.0 0.6160 0 0 0 1.0
CONTROL
aileron 1.0 0.6160 0 0 0 -1.0

SECTION
0.30388 0.40000 -0.00021 0.24886 -3.027 6 1.0
AFILE
af_y400.dat
CONTROL
elevator 1.0 0.6480 0 0 0 1.0
CONTROL
aileron 1.0 0.6480 0 0 0 -1.0

SECTION
0.33186 0.45000 -0.00022 0.23221 -3.345 6 1.0
AFILE
af_y450.dat
CONTROL
elevator 1.0 0.6400 0 0 0 1.0
CONTROL
aileron 1.0 0.6400 0 0 0 -1.0

SECTION
0.35984 0.50000 -0.00018 0.21555 -3.688 6 1.0
AFILE
af_y500.dat
CONTROL
elevator 1.0 0.6320 0 0 0 1.0
CONTROL
aileron 1.0 0.6320 0 0 0 -1.0

SECTION
0.38781 0.55000 -0.00020 0.19891 -3.994 6 1.0
AFILE
af_y550.dat
CONTROL
elevator 1.0 0.6220 0 0 0 1.0
CONTROL
aileron 1.0 0.6220 0 0 0 -1.0

SECTION
0.41579 0.60000 -0.00021 0.18226 -4.342 2 1.0
AFILE
af_y600.dat
CONTROL
elevator 1.0 0.6120 0 0 0 1.0
CONTROL
aileron 1.0 0.6120 0 0 0 -1.0

SECTION
0.42698 0.62000 -0.00021 0.17560 -4.612 2 1.0
AFILE
af_y620.dat
CONTROL
elevator 1.0 0.6060 0 0 0 1.0
CONTROL
aileron 1.0 0.6060 0 0 0 -1.0

SECTION
0.43537 0.63500 -0.00021 0.17061 -4.786 2 1.0
AFILE
af_y635.dat
CONTROL
elevator 1.0 0.6020 0 0 0 1.0
CONTROL
aileron 1.0 0.6020 0 0 0 -1.0

SECTION
0.44097 0.64500 -0.00018 0.16727 -4.938 2 1.0
AFILE
af_y645.dat
CONTROL
elevator 1.0 0.6000 0 0 0 1.0
CONTROL
aileron 1.0 0.6000 0 0 0 -1.0

SECTION
0.44376 0.65000 -0.00021 0.16561 -4.941 2 1.0
AFILE
af_y650.dat
CONTROL
elevator 1.0 0.5980 0 0 0 1.0
CONTROL
aileron 1.0 0.5980 0 0 0 -1.0

SECTION
0.44656 0.65500 -0.00020 0.16394 -4.934 2 1.0
AFILE
af_y655.dat
CONTROL
elevator 1.0 0.5960 0 0 0 1.0
CONTROL
aileron 1.0 0.5960 0 0 0 -1.0

SURFACE
Winglet
8 1.0 10 1.0
YDUPLICATE
0.0

SECTION
0.45424 0.66499 0.01221 0.14235 0.0

SECTION
0.52215 0.66662 0.05221 0.10139 0.0

SECTION
0.59006 0.66619 0.09221 0.05819 0.0
